new Capacitor.cap35994884 phases=3 bus1=173997362.1.2.3 bus2=173997362.4.4.4 kvar=300
new Capacitor.cap1593 phases=3 bus1=126414222.1.2.3 bus2=126414222.4.4.4 kvar=300
new Capacitor.cap35994722 phases=3 bus1=162121521.1.2.3 bus2=162121521.4.4.4 kvar=300
new Capacitor.cap1600 phases=3 bus1=139958984.1.2.3 bus2=139958984.4.4.4 kvar=300
